folder simulations: version=36; creator=Apsim 7.8-r3867
  targets: Target=/simulations/wheat/paddock/vert
  vars
  simulation wheat
    targets
    vars
    metfile met: filename=4_Dalby.met
    clock
      start_date = 01/01/2000  # Enter the start date of the simulation
      end_date = 31/12/2002  # Enter the end date of the simulation
    summaryfile
    area paddock
      surfaceom SurfaceOrganicMatter
        PoolName = wheat  # Organic Matter pool name
        type = wheat  # Organic Matter type
        mass = 1000  # Initial surface residue (kg/ha)
        cnr = 80  # C:N ratio of initial residue
        standing_fraction = 0  # Fraction of residue standing
      fertiliser
      wheat
      folder Manager
        manager Reset_sowing
          # When should a reset be done
          modulename = wheat  # The module the event is to come from
          eventname = sowing  # On which event should a reset be done
          # Reset details
          soilmodule = vert  # Name of your soil module
          surfaceommodule = SurfaceOrganicMatter  # Name of your surface organic matter module
          pmodule = vert  # Name of your phosphorus module
          solutemodule = Cl  # Name of your Cl module
          resetWater = yes  # Reset soil water?
          resetNitrogen = yes  # Reset soil nitrogen?
          resetSurfaceOM = yes  # Reset surface organic matter?
          resetP = no  # Reset phosphorus?
          resetCl = no  # Reset Cl?
          on [modulename].[eventname]:
```
            resetWater = '[resetWater]'
            resetNitrogen  = '[resetNitrogen]'
            resetSurfaceOM = '[resetSurfaceOM]'
            resetP = '[resetP]'
            resetCl = '[resetCl]'            
            if (resetWater = 'yes') then
                '[soilmodule] Water' reset
            endif
            if (resetNitrogen = 'yes') then
                '[soilmodule] Nitrogen' reset
            endif
            if (resetSurfaceOM = 'yes') then
                '[surfaceommodule]' reset
            endif
            if (resetP = 'yes') then
                '[pmodule]' reset
            endif
            if (resetCl = 'yes') then
               '[solutemodule]' set cl = 15.3 30.4 155.7 476.9 795.4 990.0 1035.0 (kg/ha)
            endif
            if (resetWater = 'yes' or resetNitrogen = 'yes' or resetSurfaceOM = 'yes' or resetP = 'yes' or resetCl = 'yes') then
               act_mods reseting
            endif
```
        manager Sowing_rule
          # Sowing criteria
          date1 = 15-may  # Enter sowing window START date (dd-mmm)
          date2 = 30-jun  # Enter sowing window END date (dd-mmm)
          must_sow = yes  # Must sow?
          raincrit = 20  # Amount of rainfall
          rainnumdays = 7  # Number of days of rainfall
          esw_amount = 100  # Enter minimum allowable available soil water (mm)
          # Sowing parameters
          crop = wheat  # Enter name of crop to sow
          density = 100  # Enter sowing density (plants/m2)
          depth = 30  # Enter sowing depth (mm)
          cultivar = hartog  # Enter cultivar
          class = plant  # Enter crop growth class
          row_spacing = 250  # Enter row spacing (mm)
          on start_of_day:
```
      if (paddock_is_fallow() = 1 and FallowIn <> 'yes' and (NextCrop = 0 or NextCrop = '[crop]')) then
         if (date_within('[date1], [date2]') = 1) then
            if (rain[[rainnumdays]] >= [raincrit] AND esw >= [esw_amount]) OR
                ('[must_sow]' = 'yes' AND today = date('[date2]'))) THEN
               ChooseNextCrop = 'yes'   ! for rotations
date_before_sowing = dd_mm_yyyy ! shows the actual date of sowing
swd_all_before_sowing = dul_dep()-sw_dep()
               sw_all_before_sowing = sw_dep()
               pawc_all_before_sowing = sw_dep() - ll()
               pawc_all_cent_before_sowing = (sw_dep()-ll())*100/pawc_all
               sawc_all_before_sowing = sw_dep() - ll15_dep()
               sawc_all_cent_before_sowing = (sw_dep()-ll15_dep())*100/sawc_all                
               cl_ppm_before_sowing = ((cl_ppm(1)*15)+(cl_ppm(2)*15)+(cl_ppm(3)*30)+(cl_ppm(4)*30)+(cl_ppm(5)*30)+(cl_ppm(6)*30)+(cl_ppm(7)*30))/180
no3_ppm_before_sowing = (no3ppm(1)
[crop] sow plants =[density], sowing_depth = [depth], cultivar = [cultivar], row_spacing = [row_spacing], crop_class = [class]
            endif
            if today = date('[date2]') then
               ChooseNextCrop = 'yes'
            endif
         endif
      endif
```
          on init:
```
            nextcrop = 0
            fallowin = 0
```
        manager Sowing_fertiliser
          # When should fertiliser be applied
          modulename = wheat  # On which module should the event come from
          eventname = sowing  # On which event should fertiliser be applied
          # Fertiliser application details
          fertmodule = fertiliser  # Module used to apply the fertiliser
          fert_amount_sow = 150  # Amount of starter fertiliser at sowing (kg/ha)
          fert_type_sow = urea_N  # Sowing fertiliser type
          on [modulename].[eventname]:
```
        [fertmodule] apply amount = [fert_amount_sow] (kg/ha), depth = 50 (mm), type = [fert_type_sow]
```
        manager Harvesting_rule
          # Harvesting criteria
          crop = wheat  # Enter name of crop to harvest when ripe
          on end_of_day:
```
           if [crop].StageName = 'harvest_ripe' or [crop].plant_status = 'dead' then
              [crop]  harvest
              [crop]  end_crop
           endif
```
        manager Formulas_CTF
          on init:
```
therm_time_tot = 0

sw_all = 0
swd_all = 0

total_n_loss_a_today = 0
total_n_loss_b_today = 0
losses = 0
losses_old = 0
losses_old_b = 0
resid_n = 0
bal_n_old = 0
bal_n_old_b = 0
net_n_min_tot() = 0
```
          on end_of_day:
```
sat_all=sat_dep()
dul_all=dul_dep()
dp_all=sat_dep()-dul_dep()
ll15_all=ll15_dep()
sw_all_now =sw_dep()
swd_all_now=dul_dep()-sw_dep()
ll_all=ll() ! ll15_dep for ll15 and ll for ll crop

! some more calculations
sw_av_all = sw_dep()-ll15_dep() ! avilable soil water in the profile. This is same as esw (variable)
! esw = sw_av_all, i.e. this is the average soil water from all layers
sw_dep_m = sw_dep()/1.8


sawc_all = dul_dep()-ll15_dep()
sawc_all_now = sw_dep() - ll15_dep()
sawc_all_cent_now = (sw_dep()-ll15_dep())*100/sawc_all

pawc_all=dul_dep()-ll()
pawc_all_now = sw_dep() - ll()
pawc_all_cent_now = (sw_dep()-ll())*100/pawc_all

change_soil_water = sw_all_before_sowing - sw_all
change_swd_all=swd_all_before_sowing - swd_all

totalrain = incroprain+fallowrain
totalirrigation=incropirrigation+fallowirrigation
totaltrans=incroptrans
totaldrain = incropdrain+fallowdrain
totalrunoff = incroprunoff+fallowrunoff
totaleos = incropeos+falloweos
totales = incropes+fallowes
totalet =incropet+fallowet
totalleachcl =incropleachcl+fallowleachcl


trans=evap_plant
et = evap_tot 
evap_total = trans + es
et = es + ep ! this is same as evap_total created by me and evap_tot default variable
! note: evap_tot, the default parameter calculates et (evap by soil + plant only for incrop only. It does not calculates the total for fallow
av_temp = (MaxT + MinT)/2
dly_therm_time = av_temp - t_base 

if (dly_therm_time < t_base) then
dly_therm_time = 0     
else
dly_therm_time = av_temp - t_base 
endif
 
     
therm_time_tot = therm_time_tot + dly_therm_time

! create a variable called dlt_n_immo_tot which accounts only the negetive values of dlt_n_min_tot()
if (dlt_n_min_tot() < 0 then
dlt_n_immo_tot= dlt_n_min_tot()*-1 
else
dlt_n_immo_tot = 0
endif

n_net_change = dlt_nh4_net()+ dlt_no3_net()

if (dlt_nh4_net() < 0 then
nh4_net_immo = dlt_nh4_net()*-1 
else
nh4_net_immo = 0
endif
if (dlt_no3_net() < 0 then
no3_net_immo = dlt_no3_net()*-1 
else
no3_net_immo = 0
endif

if (n_net_change < 0 then
n_net_immo = n_net_change *-1 
else
n_net_immo = 0
endif




! dsg now do an N balance and calculate an 'error'! apsim codes 3
soil_n = nit_tot()
!resid_n = surfaceom.surfaceom_n
plant_n = d_nup

! losses
leach_n = leach_no3
dnit_n = dnit()

total_n = soil_n + resid_n + plant_n
!losses = losses + leach_n + dnit_n
bal_n = total_n + losses
!error = bal_n - bal_n_old
!bal_n_old = bal_n

n_loss = dnit() + leach_no3 + dlt_n_loss_in_sed  ! kg/ha

! calculation of N loss
total_n_change = nit_tot() - d_nup
total_n_change_b = nh4() + no3() + net_n_min_tot()- d_nup

!ignore this line: !total_n_change_cum = (total_n_change_cum + total_n_change)             : !total_n_change_b_cum = (total_n_change_b_cum + total_n_change_b) 

!calculate the daily change in the N : !this includes + for gain to the soil and - for loss from the soil
!method a: 
total_n_change_daily = total_n_change - losses_old    
losses_old = total_n_change
! method b
total_n_change_daily_b = total_n_change_b - losses_old_b
losses_old_b = total_n_change_b

! now seperate the net change into positive and negetive values
if (total_n_change_daily <= 0) then
total_n_loss_daily = total_n_change_daily *-1 
else
total_n_loss_daily = 0.0
endif

if (total_n_change_daily > 0) then
total_n_gain_daily = total_n_change_daily 
else
total_n_gain_daily = 0.0
endif

if (total_n_change_daily_b <= 0) then
total_n_loss_daily_b = total_n_change_daily_b *-1 
else
total_n_loss_daily_b = 0.0
endif

if (total_n_change_daily_b > 0) then
total_n_gain_daily_b = total_n_change_daily_b
else
total_n_gain_daily_b = 0.0
endif

totalfertiliser = fallowfertiliser+incropfertiliser
totalnloss = fallownloss+incropnloss

! Average Chloride concentration from all the layers
cl_ppm_avg = ((cl_ppm(1)*15)+(cl_ppm(2)*15)+(cl_ppm(3)*30)+(cl_ppm(4)*30)+(cl_ppm(5)*30)+(cl_ppm(6)*30)+(cl_ppm(7)*30))/180

! Average no3 concentration from all the layers
no3_ppm_avg = ((no3ppm(1)*15)+(no3ppm(2)*15)+(no3ppm(3)*30)+(no3ppm(4)*30)+(no3ppm(5)*30)+(no3ppm(6)*30)+(no3ppm(7)*30))/180

!common terms used for cotton apsim model
!ep=evap_plant=transpiration
!evap_soil=es=soil evaporation
!evap_tot=evapotranspiration
!leach_cl is the total leaching of cl below root zone (kg/ha). which is same as
!flow_cl(x) where x is the bottom soil layer


! erosion calculations
! sed_conc is in g/L
if (cover_tot < 50) then   
sed_conc = 16.52 - 0.46 * cover_tot + 0.0031 * cover_tot * cover_tot 
endif
if (cover_tot = 0) then
sed_conc = 162.2
endif
if (cover_tot >= 50) then
sed_conc = -0.0254 * cover_tot + 2.54
endif

s = 0.001 !s = sine of slope angle 1 is the slope in %; usually it will be slope % devided by 0.01
power_ls = 0.6 *(1.0 - 2.71828^(-35.835*s)) ! power equation in ls calculation
ls_factor = ((100/22.1)^ power_ls) * (65.41 * s * s + 4.56 * s + 0.065)

erosion = sed_conc * ls_factor * 0.45 * 1 * 1/10 * runoff

!offsite_sed_delivery = erosion * sed_del_ratio !offsite_sed_delivery = t/ha; erosion = t/ha; sed_Del_rat = fraction e.g. 0.14;
```
          on sowing:
```
date_sowing = dd_mm_yyyy  ! works only if reporting frequency is selected as harvest, if selected as sowing, previous year sowing is shown
sw_all_after_sowing = sw_dep()
swd_all_after_sowing = dul_dep()-sw_dep()
sawc_all_cent_after_sowing = (sw_dep()-ll15_dep())*100/sawc_all
pawc_all_cent_after_sowing = (sw_dep()-ll())*100/pawc_all
cl_ppm_after_sowing = ((cl_ppm(1)*15)+(cl_ppm(2)*15)+(cl_ppm(3)*30)+(cl_ppm(4)*30)+(cl_ppm(5)*30)+(cl_ppm(6)*30)+(cl_ppm(7)*30))/180
no3_ppm_after_sowing = no3ppm(1)
```
        tracker
          variable:
            sum of dly_therm_time on end_day from sowing to harvesting as tt_sum
            sum of rain on end_day from sowing to harvesting as incroprain
            sum of rain on end_day from harvesting to sowing as fallowrain
            sum of irrigation on end_day from sowing to harvesting as incropirrigation
            sum of irrigation on end_day from harvesting to sowing as fallowirrigation
            sum of es on end_day from sowing to harvesting as incropes
            sum of es on end_day from harvesting to sowing as fallowes
            sum of drain on end_day from sowing to harvesting as Incropdrain
            sum of drain on end_day from harvesting to sowing as fallowdrain
            sum of runoff on end_day from sowing to harvesting as Incroprunoff
            sum of runoff on end_day from harvesting to sowing as fallowrunoff
            sum of evap_tot on end_day from sowing to harvesting as incropet
            sum of evap_tot on end_day from harvesting to sowing as fallowet
            sum of ep on end_day from sowing to harvesting as incroptrans
            date of sowing from reported to now as sowing_date1
            date of sowing as sowing_date
            sum of rain on end_of_day from start_year to end_year as yearrain
            sum of rain on end_day from reported to now as rainfall1
            sum of runoff on end_day from reported to now as runoff1
            sum of drain on end_day from reported to now as drain1
            sum of eos on end_day from reported to now as eos1
            sum of es on end_day from reported to now as es1
            sum of eos on end_day from sowing to harvesting as incropeos
            sum of eos on end_day from harvesting to sowing as falloweos
            sum of evap_soil on end_day from sowing to harvesting as incropsoilevap
            sum of leach_cl on end_day from harvesting to sowing as fallowleach_cl
            sum of leach_cl on end_day from sowing to harvesting as incropleach_cl
            sum of leach_cl on end_day from start_year to sowing as fallowleach_cl1
      outputfile: filename=wheat.out; title=wheat
        variables
          variables: dd/mm/yyyy as Date, biomass, yield, sawc_all_cent_after_sowing, sawc_all, no3_ppm_after_sowing
        events Reporting_Frequency: event=harvesting
      Soil vert: ASCOrder=Vertosol; SoilType=Clay; Site=Generic (PAWC289); NearestTown=Dalby; Region=Darling Downs and Granite Belt; State=Queensland; Country=Australia; NaturalVegetation=NA; ApsoilNumber=513-GENERIC; Latitude=-27.183286; Longitude=151.263748; LocationAccuracy=Regional Soil Type; YearOfSampling=0; DataSource=Generic soil. CSIRO Sustainable Ecosystems, Toowoomba
        Comments=Generic soil developed by Allan Peake. 'Typical Vertosol' soil properties have been calculated as the average of vertosols with similar characteristics from within the Apsoil database. Groupings were made on the basis of bulk density. Measured BD, DUL and CLL for the groups were then averaged to derive the characteristics of the typical Vertosols. They can then be used in conjunction with measured soil water to simplify the selection of appropriate Vertosols, for paddocks where full soil characterisations have not yet been completed. For more information see Peake et al. 2010: ‘A rapid method for estimating the plant available water capacity of Vertosols’, 2010 Australian Agronomy Conference. Typical Vertosols are different to 'Generic' soil types elsewhere in the Apsoil database, which are representative of certain soil types and districts, but have not been calculated from large numbers of similar, characterised soils.
        Water
          Thickness  BD    AirDry  LL15   DUL    SAT
          150        0.99  0.135   0.27   0.546  0.596
          150        1.04  0.225   0.281  0.529  0.579
          300        1.06  0.305   0.305  0.519  0.569
          300        1.07  0.305   0.305  0.517  0.567
          300        1.1   0.305   0.305  0.505  0.555
          300        1.14  0.305   0.305  0.49   0.54
          300        1.16  0.305   0.305  0.481  0.531
          BD source: Calculated from gravimetric moisture when profile wet but drained
          AirDry, LL15 source: Estimated based on local knowledge
          DUL source: FM & E
          SAT source: Calculated from measured, estimated or calculated BD
          SoilCrop wheat: LL=[0.27, 0.281, 0.305, 0.305, 0.305, 0.305, 0.305]; KL=[0.06, 0.06, 0.06, 0.04, 0.04, 0.02, 0.02]; XF=[1, 1, 1, 1, 1, 1, 1]
            LL source: Field measured and checked for sensibility
        SoilWater: SummerCona=3.5; SummerU=6; SummerDate=1-Nov; WinterCona=2.5; WinterU=4; WinterDate=1-Apr; DiffusConst=40; DiffusSlope=16; Salb=0.12; CN2Bare=73; CNRed=20; CNCov=0.8; Thickness=[150, 150, 300, 300, 300, 300, 300]; SWCON=[0.3, 0.3, 0.3, 0.3, 0.3, 0.3, 0.3]
        SoilOrganicMatter: RootCN=40; RootWt=1000; SoilCN=12; EnrACoeff=7.4; EnrBCoeff=0.2; OCUnits=WalkleyBlack
          Thickness  OC    FBiom  FInert
          150        2.25  0.04   0.4
          150        2.25  0.02   0.6
          300        0.9   0.02   0.8
          300        0.9   0.02   1
          300        0.68  0.01   1
          300        0.45  0.01   1
          300        0.45  0.01   1
          OC source: Estimated based on local knowledge
        Analysis: Thickness=[150, 150, 300, 300, 300, 300, 300]; PH=[8.4, 8.6, 8.9, 8.9, 8.8, 8.6, 8.4]; PHUnits=Water; BoronUnits=HotWater
          PH source: Measured, Estimated based on local knowledge
        InitialWater: FractionFull=1; PercentMethod=FilledFromTop
          targets
            Target=[/simulations/wheat/paddock/vert, /simulations/wheat/paddock/vert/InitialWater]
        Sample InitialNitrogen: NO3Units=ppm; NH4Units=ppm; SWUnits=Volumetric; OCUnits=Total; PHUnits=Water
          Thickness  NO3  NH4
          150        40   4
          150        40   4
          300        40   4
          300        10   1
          300        10   1
          300        10   1
          300        10   1
      outputfile outputfile1 (disabled): filename=wheat outputfile1.out; title=wheat outputfile1
        variables
          variables: dd/mm/yyyy as Date, biomass, yield, sawc_all_cent_after_sowing, no3_ppm_after_sowing, no3ppm(1)
        events Reporting_Frequency: event=daily
  factorial Factorials: active=0
    settings: fn=1
